*Heading
** Job name: tube Model name: Model-1
** Generated by: Abaqus/CAE 2022.HF4
*Preprint, echo=NO, model=NO, history=NO, contact=NO
**
** PARTS
**
*Part, name=Part-1
*End Part
**
**
** ASSEMBLY
**
*Assembly, name=Assembly
**
*Instance, name=Part-1-1, part=Part-1
*Node
      1,          20.,           0.,         200.
      2,          20.,           0.,         100.
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*Element, type=S4R
  1,   1,  10, 138,  58
  2,  10,  11, 139, 138
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*Nset, nset=_PickedSet4, internal, generate
   1,  851,    1
*Elset, elset=_PickedSet4, internal, generate
   1,  828,    1
** Section: Section-1
*Shell Section, elset=_PickedSet4, material=steel
2., 3
*End Instance
**
*Nset, nset=edge-path, instance=Part-1-1
  2,  3,  4, 27, 28, 29
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*Elset, elset=edge-path, instance=Part-1-1
  18,  36,  54,  72,  90, 108
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*Nset, nset=edge-path2, instance=Part-1-1
  1,  2,  7, 10, 11, 12
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*Elset, elset=edge-path2, instance=Part-1-1
   1,   2,   3,   4,   5,   6
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*Nset, nset=node-path, instance=Part-1-1
 2,
*Nset, nset=node-path2, instance=Part-1-1
 7,
*Nset, nset=_PickedSet12, internal, instance=Part-1-1
   7,   8,   9, 108, 109, 110
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*Elset, elset=_PickedSet12, internal, instance=Part-1-1
 217, 235, 253, 271, 289, 307
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*Elset, elset=__PickedSurf13_E4, internal, instance=Part-1-1, generate
   1,  199,   18
*Elset, elset=__PickedSurf13_E2, internal, instance=Part-1-1, generate
 648,  828,   18
*Surface, type=ELEMENT, name=_PickedSurf13, internal
__PickedSurf13_E4, E4
__PickedSurf13_E2, E2
*End Assembly
**
** MATERIALS
**
*Material, name=steel
*Elastic
210000., 0.3
** ----------------------------------------------------------------
**
** STEP: Step-1
**
*Step, name=Step-1, nlgeom=YES, extrapolation=PARABOLIC
*Static
0.3, 1., 1e-05, 1.
**
** BOUNDARY CONDITIONS
**
** Name: BC-1 Type: Symmetry/Antisymmetry/Encastre
*Boundary
_PickedSet12, ENCASTRE
**
** LOADS
**
** Name: Load-1   Type: Shell edge load
*Dsload, follower=NO
_PickedSurf13, EDLD, 500., -1., 0., 0.
**
** OUTPUT REQUESTS
**
*Restart, write, frequency=0
**
** FIELD OUTPUT: F-Output-1
**
*Output, field, variable=PRESELECT
**
** HISTORY OUTPUT: H-Output-1
**
*Output, history, variable=PRESELECT
*End Step
